<?xml version="1.0" encoding="UTF-8"?>
<aerodynamics>
    <function name="aero/coefficients/Cac">
        <description>Wing area correction due to wing sweep</description>
        <table name="Cc">
            <independentVar lookup="row">fcs/wing-sweep</independentVar>
            <tableData>
                0   1.00
                1   0.92
            </tableData>
        </table>
    </function>
    <function name="aero/coefficients/Cla">
        <description>Lift due to alpha</description>
        <table name="Cy">
            <independentVar lookup="row">aero/alpha-deg</independentVar>
            <independentVar lookup="column">fcs/wing-sweep</independentVar>
            <tableData>
                    0.0    0.5    1.0
              -10  -0.34  -0.30  -0.19
               -5  -0.13  -0.14  -0.08
                0   0.08   0.02   0.03
                5   0.30   0.20   0.16
               10   0.50   0.38   0.28
               15   0.70   0.55   0.40
               20   0.88   0.73   0.54
               25   0.98   0.88   0.68
               30   1.02   0.99   0.83
            </tableData>
        </table>
    </function>
    <function name="aero/coefficients/Cle">
        <description>Lift due to Elevator Deflection</description>
        <product>
            <property>fcs/elevator-pos-rad</property>
            <value>0.2</value>
        </product>
    </function>
    <function name="aero/coefficients/Clf">
        <description>Lift due to flaps</description>
        <product>
            <property>fcs/flap-pos-deg</property>
            <value>0.008</value>
        </product>
    </function>
    <function name="aero/coefficients/Clm">
       <description>Lift due to mach</description>
       <table name="Cm">
           <independentVar lookup="row">velocities/mach</independentVar>
           <independentVar lookup="column">fcs/wing-sweep</independentVar>
           <tableData>
               0.0    0.5    1.0
         0.2   1.00   1.00   1.00
         0.4   1.01   1.02   1.00
         0.6   1.08   1.06   1.00
         0.8   1.19   1.11   1.00
         1.0   1.19   1.06   1.00
         1.2   1.19   0.92   1.00
         1.4   1.19   0.81   0.94
         1.6   1.19   0.70   0.89
         1.8   1.19   0.60   0.80
         2.0   1.19   0.50   0.74
           </tableData>
       </table>
   </function>

   <function name="aero/coefficients/Cdc">
       <description>Drag due to chute</description>
       <product>
           <property>systems/chute/unfurl-norm</property>
           <value>0.27</value>
       </product>
   </function>
   <function name="aero/coefficients/Cd0">
       <description>Drag due to mach</description>
       <product>
           <table>
               <independentVar lookup="row">velocities/mach</independentVar>
               <independentVar lookup="column">fcs/wing-sweep</independentVar>
               <tableData>
                 0.0     0.5     1.0
           0.2   0.024   0.023   0.021
           0.4   0.024   0.023   0.021
           0.6   0.024   0.023   0.021
           0.8   0.025   0.023   0.022
           1.0   0.050   0.035   0.030
           1.2   0.060   0.044   0.033
           1.4   0.060   0.044   0.032
           1.6   0.060   0.043   0.030
               </tableData>
           </table>
           <value>1.0</value>
       </product>
   </function>
   <function name="aero/coefficients/Cda">
       <description>Drag due to alpha</description>
       <table>
           <independentVar lookup="row">aero/alpha-deg</independentVar>
           <independentVar lookup="column">fcs/wing-sweep</independentVar>
           <tableData>
                0.0    0.5    1.0
           -15  0.045  0.065  0.050
           -10  0.015  0.025  0.022
            -5  0.005  0.005  0.005
             0  0.000  0.000  0.000
             5  0.005  0.005  0.005
            10  0.015  0.025  0.022
            15  0.045  0.060  0.050
            20  0.135  0.115  0.095
            25  0.220  0.200  0.155
            30  0.350  0.300  0.235
           </tableData>
       </table>
   </function>
   <function name="aero/coefficients/Cdf">
       <description>Drag due to flaps</description>
       <product>
           <property>fcs/flap-pos-deg</property>
           <value> 0.003 </value>
       </product>
   </function>
   <function name="aero/coefficients/Cdg">
       <description>Drag due to gear</description>
       <product>
           <property>gear/gear-pos-norm</property>
           <value>0.016</value>
       </product>
   </function>
   <function name="aero/coefficients/Cdb">
       <description>Drag due to speedbrakes</description>
       <product>
           <property>fcs/speedbrake-pos-norm</property>
           <value>0.1</value>
       </product>
   </function>
   <function name="aero/coefficients/Cds">
       <description>Drag due to sideslip</description>
       <table>
           <independentVar lookup="row">aero/beta-rad</independentVar>
           <tableData>
              -1.57   1.23
              -0.26   0.05
               0.00   0.00
               0.26   0.05
               1.57   1.23
           </tableData>
       </table>
   </function>
   <function name="aero/coefficients/Cde">
       <description>Drag due to Elevator Deflection</description>
       <product>
           <abs><property>fcs/elevator-pos-norm</property></abs>
           <value>0.04</value>
       </product>
   </function>

    <function name="aero/coefficients/Csb">
       <description>Side force due to beta</description>
       <product>
           <property>aero/beta-rad</property>
           <value>-1</value>
       </product>
    </function>

    <function name="aero/coefficients/Cpa">
        <description>Pitch moment due to alpha</description>
        <product>
            <property>aero/alpha-rad</property>
            <value>-0.6</value>
        </product>
    </function>
    <function name="aero/coefficients/Cpe">
        <description>Pitch moment due to elevator</description>
        <product>
            <property>fcs/elevator-pos-rad</property>
            <table>
                <independentVar lookup="row">velocities/mach</independentVar>
                <tableData>
                    0.0     -0.4
                    2.0     -0.1
                </tableData>
            </table>
        </product>
    </function>
    <function name="aero/coefficients/Cpd">
        <description>Pitch damp</description>
        <product>
            <property>aero/ci2vel</property>
            <property>velocities/q-aero-rad_sec</property>
            <value>-30</value>
        </product>
    </function>
    <function name="aero/coefficients/Cpr">
        <description>Pitch moment due to alpha rate</description>
        <product>
            <property>aero/ci2vel</property>
            <property>aero/alphadot-rad_sec</property>
            <value>-9</value>
        </product>
    </function>

    <function name="aero/coefficients/Cra">
        <description>Roll moment due to aileron</description>
        <product>
            <property>fcs/left-aileron-pos-rad</property>
            <table>
                <independentVar lookup="row">velocities/mach</independentVar>
                <tableData>
                    0.0    0.10
                    1.0    0.05
                </tableData>
            </table>
        </product>
    </function>
    <function name="aero/coefficients/Crb">
        <description>Roll moment due to beta</description>
        <product>
            <property>aero/beta-rad</property>
            <value>-0.003</value>
        </product>
    </function>
    <function name="aero/coefficients/Crd">
        <description>Roll damp</description>
        <product>
            <property>aero/bi2vel</property>
            <property>velocities/p-aero-rad_sec</property>
            <value>-0.4</value>
        </product>
    </function>
    <function name="aero/coefficients/Cry">
        <description>Roll moment due to yaw rate</description>
        <product>
            <property>aero/bi2vel</property>
            <property>velocities/r-aero-rad_sec</property>
            <value>0.15</value>
        </product>
    </function>
    <function name="aero/coefficients/Crr">
        <description>Roll moment due to rudder</description>
        <product>
            <property>fcs/rudder-pos-rad</property>
            <value>0.003</value>
        </product>
    </function>

    <function name="aero/coefficients/Cyb">
        <description>Yaw moment due to beta</description>
        <product>
            <property>aero/beta-rad</property>
            <value>0.1</value>
        </product>
    </function>
    <function name="aero/coefficients/Cyd">
        <description>Yaw damp</description>
        <product>
            <property>aero/bi2vel</property>
            <property>velocities/r-aero-rad_sec</property>
            <value>-0.25</value>
        </product>
    </function>
    <function name="aero/coefficients/Cyr">
        <description>Yaw moment due to rudder</description>
        <product>
            <property>fcs/rudder-pos-rad</property>
            <table name="aero/table/Cn_rudder">
                <independentVar lookup="row">aero/alpha-deg</independentVar>
                <independentVar lookup="column">aero/beta-deg</independentVar>
                <tableData>
                                 -50.0      -30.0     -20.0     0.0     20.0       30.0    50.0
                        -80.0      0.000    -0.005    -0.010   -0.025   -0.010    -0.005    0.000
                        -70.0      0.000    -0.005    -0.015   -0.030   -0.015    -0.005    0.000
                        -60.0     -0.002    -0.010    -0.020   -0.035   -0.020    -0.010   -0.002
                        -50.0     -0.004    -0.0125   -0.0233  -0.040   -0.0233   -0.0125  -0.004
                        -40.0     -0.006    -0.015    -0.025   -0.055   -0.025    -0.015   -0.006
                        -20.0     -0.010    -0.025    -0.040   -0.075   -0.040    -0.025   -0.010
                          0.0     -0.013    -0.033    -0.055   -0.090   -0.055    -0.033   -0.013
                         10.0     -0.012    -0.035    -0.055   -0.090   -0.055    -0.035   -0.012
                         20.0     -0.010    -0.030    -0.050   -0.085   -0.050    -0.030   -0.010
                         30.0     -0.008    -0.020    -0.035   -0.075   -0.035    -0.020   -0.008
                         40.0     -0.005    -0.010    -0.020   -0.045   -0.020    -0.010   -0.005
                         50.0      0.000    -0.005    -0.005   -0.015   -0.005    -0.005    0.000
                         60.0      0.000     0.000     0.000    0.000    0.000     0.000    0.000
                </tableData>
            </table>
        </product>
    </function>

    <axis name="LIFT">
        <function name="aero/force/LIFT">
            <description>LIFT Force</description>
            <product>
                <property>aero/qbar-psf</property>
                <property>metrics/Sw-sqft</property>
                <sum>
                    <property>aero/coefficients/Cla</property>
                    <property>aero/coefficients/Clf</property>
                </sum>
                <property>aero/coefficients/Cac</property>
                <property>aero/coefficients/Clm</property>
                <sum>
                    <product>
                        <sum>
                            <property>fcs/dogtooth</property>
                            <property>fcs/vortex-generator</property>
                            <property>fcs/intake2-pos-norm</property>
                        </sum>
                        <value>0.05</value>
                    </product>
                    <value>1.0</value>
                </sum>
            </product>
        </function>
    </axis>
    <axis name="DRAG">
        <function name="aero/force/DRAG">
            <description>DRAG Force</description>
            <product>
                <property>aero/qbar-psf</property>
                <property>metrics/Sw-sqft</property>
                <sum>
                    <property>aero/coefficients/Cdc</property>
                    <property>aero/coefficients/Cd0</property>
                    <property>aero/coefficients/Cda</property>
                    <property>aero/coefficients/Cdb</property>
                    <property>aero/coefficients/Cdf</property>
                    <property>aero/coefficients/Cdg</property>
                </sum>
                <property>aero/coefficients/Cac</property>
                <sum>
                    <product>
                        <sum>
                            <property>fcs/dogtooth</property>
                            <property>fcs/vortex-generator</property>
                            <property>fcs/intake2-pos-norm</property>
                        </sum>
                        <value>0.03</value>
                    </product>
                    <value>1.0</value>
                </sum>
            </product>
        </function>
    </axis>
    <axis name="SIDE">
        <function name="aero/force/SIDE">
            <description>SIDE Force</description>
            <product>
                <property>aero/qbar-psf</property>
                <property>metrics/Sw-sqft</property>
                <property>aero/coefficients/Csb</property>
            </product>
        </function>
    </axis>
    <axis name="ROLL">
        <function name="aero/force/ROLL">
            <description>ROLL Moment</description>
            <product>
                <property>aero/qbar-psf</property>
                <property>metrics/Sw-sqft</property>
                <property>metrics/bw-ft</property>
                <sum>
                    <property>aero/coefficients/Cra</property>
                    <property>aero/coefficients/Crd</property>
                </sum>
            </product>
        </function>
    </axis>
    <axis name="PITCH">
        <function name="aero/force/PITCH">
            <description>PITCH Moment</description>
            <product>
                <property>aero/qbar-psf</property>
                <property>metrics/Sw-sqft</property>
                <property>metrics/cbarw-ft</property>
                <sum>
                    <property>aero/coefficients/Cpd</property>
                    <property>aero/coefficients/Cpr</property>
                    <property>aero/coefficients/Cpe</property>
                </sum>
            </product>
        </function>
    </axis>
    <axis name="YAW">
        <function name="aero/force/YAW">
            <description>YAW Moment</description>
            <product>
                <property>aero/qbar-psf</property>
                <property>metrics/Sw-sqft</property>
                <property>metrics/bw-ft</property>
                <sum>
                    <property>aero/coefficients/Cyb</property>
                    <property>aero/coefficients/Cyd</property>
                    <property>aero/coefficients/Cyr</property>
                </sum>
            </product>
        </function>
    </axis>
 </aerodynamics>
