<?xml version="1.0" encoding="UTF-8"?>
<flight_control name="FCS: MiG-23-Jsb">
    <property value="1">fcs/yaw-damper-enable</property>
    <property value="0">fcs/intake1-cmd-norm</property>

    <channel name="Pitch">
        <summer name="Pitch Trim Sum">
            <input>fcs/elevator-cmd-norm</input>
            <input>fcs/pitch-trim-cmd-norm</input>
            <clipto>
                <min> -1 </min>
                <max>  1 </max>
            </clipto>
        </summer>
        <aerosurface_scale name="Elevator Control">
            <input>fcs/pitch-trim-sum</input>
            <range>
                <min> -0.35 </min>
                <max>  0.35 </max>
            </range>
            <output>fcs/elevator-pos-rad</output>
        </aerosurface_scale>
        <aerosurface_scale name="elevator normalization">
            <input>fcs/elevator-pos-rad</input>
            <domain>
                <min> -0.35 </min>
                <max>  0.35 </max>
            </domain>
            <range>
                <min> -1 </min>
                <max>  1 </max>
            </range>
            <output>fcs/elevator-pos-norm</output>
        </aerosurface_scale>
    </channel>

    <channel name="Roll">
        <summer name="Roll Trim Sum">
            <input>fcs/aileron-cmd-norm</input>
            <input>fcs/roll-trim-cmd-norm</input>
            <clipto>
                <min> -1 </min>
                <max>  1 </max>
            </clipto>
        </summer>
        <aerosurface_scale name="Left Aileron Control">
            <input>fcs/roll-trim-sum</input>
            <range>
                <min> -0.35 </min>
                <max>  0.35 </max>
            </range>
            <output>fcs/left-aileron-pos-rad</output>
        </aerosurface_scale>
        <aerosurface_scale name="Right Aileron Control">
            <input>fcs/roll-trim-sum</input>
            <range>
                <min> -0.35 </min>
                <max>  0.35 </max>
            </range>
            <output>fcs/right-aileron-pos-rad</output>
        </aerosurface_scale>
        <aerosurface_scale name="left aileron normalization">
            <input>fcs/left-aileron-pos-rad</input>
            <domain>
                <min> -0.35 </min>
                <max>  0.35 </max>
            </domain>
            <range>
                <min> -1 </min>
                <max>  1 </max>
            </range>
            <output>fcs/left-aileron-pos-norm</output>
        </aerosurface_scale>
        <aerosurface_scale name="right aileron normalization">
            <input>fcs/right-aileron-pos-rad</input>
            <domain>
                <min> -0.35 </min>
                <max>  0.35 </max>
            </domain>
            <range>
                <min> -1 </min>
                <max>  1 </max>
            </range>
            <output>fcs/right-aileron-pos-norm</output>
        </aerosurface_scale>
    </channel>

    <channel name="Yaw">
        <summer name="Rudder Command Sum">
            <input>fcs/rudder-cmd-norm</input>
            <input>fcs/yaw-trim-cmd-norm</input>
            <clipto>
                <min> -1 </min>
                <max>  1 </max>
            </clipto>
        </summer>
        <scheduled_gain name="Yaw Damper Rate">
            <input>velocities/r-aero-rad_sec</input>
            <table>
                <independentVar lookup="row">velocities/ve-kts</independentVar>
                <tableData>
                    30     0.00
                    60     2.00
                </tableData>
            </table>
            <gain>fcs/yaw-damper-enable</gain>
        </scheduled_gain>
        <summer name="Rudder Sum">
            <input>fcs/rudder-command-sum</input>
            <input>fcs/yaw-damper-rate</input>
            <clipto>
                <min> -1.1 </min>
                <max>  1.1 </max>
            </clipto>
        </summer>
        <aerosurface_scale name="Rudder Control">
            <input>fcs/rudder-sum</input>
            <domain>
                <min> -1.1 </min>
                <max>  1.1 </max>
            </domain>
            <range>
                <min> -0.35 </min>
                <max>  0.35 </max>
            </range>
            <output>fcs/rudder-pos-rad</output>
        </aerosurface_scale>
        <aerosurface_scale name="rudder normalization">
            <input>fcs/rudder-pos-rad</input>
            <domain>
                <min> -0.35 </min>
                <max>  0.35 </max>
            </domain>
            <range>
                <min> -1 </min>
                <max>  1 </max>
            </range>
            <output>fcs/rudder-pos-norm</output>
        </aerosurface_scale>
    </channel>

    <channel name="Flaps">
        <kinematic name="Flaps Control">
            <input>fcs/flap-cmd-norm</input>
            <traverse>
                <setting>
                    <position>  0 </position>
                    <time>      1 </time>
                </setting>
                <setting>
                    <position> 22.5 </position>
                    <time>      1 </time>
                </setting>
                <setting>
                    <position> 45 </position>
                    <time>      1 </time>
                </setting>
            </traverse>
            <output>fcs/flap-pos-deg</output>
        </kinematic>
        <aerosurface_scale name="flap normalization">
            <input>fcs/flap-pos-deg</input>
            <domain>
                <min>  0 </min>
                <max> 45 </max>
            </domain>
            <range>
                <min> 0 </min>
                <max> 1 </max>
            </range>
            <output>fcs/flap-pos-norm</output>
        </aerosurface_scale>
    </channel>

    <channel name="Landing Gear">
        <kinematic name="Gear Control">
            <input>gear/gear-cmd-norm</input>
            <traverse>
                <setting>
                    <position> 0 </position>
                    <time>     0 </time>
                </setting>
                <setting>
                    <position> 1 </position>
                    <time>     5 </time>
                </setting>
            </traverse>
            <output>gear/gear-pos-norm</output>
        </kinematic>
    </channel>

    <channel name="Canopy">
        <kinematic name="Canopy Control">
            <input>fcs/canopy-cmd-norm</input>
            <traverse>
                <setting>
                    <position> 0 </position>
                    <time>     0 </time>
                </setting>
                <setting>
                    <position> 1 </position>
                    <time>     3 </time>
                </setting>
            </traverse>
            <output>fcs/canopy-pos-norm</output>
        </kinematic>
    </channel>

    <channel name="Wings">
        <kinematic name="Wing Sweep">
            <input>fcs/wingsweep-cmd-norm</input>
            <traverse>
                <setting>
                    <position>  0 </position>
                    <time>      5 </time>
                </setting>
                <setting>
                    <position>  1 </position>
                    <time>      5 </time>
                </setting>
            </traverse>
            <output>fcs/wingsweep-pos-norm</output>
        </kinematic>
    </channel>

    <channel name="Speedbrake">
        <kinematic name="Speedbrake Control">
            <input>fcs/speedbrake-cmd-norm</input>
            <traverse>
                <setting>
                    <position> 0 </position>
                    <time>     0 </time>
                </setting>
                <setting>
                    <position> 1 </position>
                    <time>     1 </time>
                </setting>
            </traverse>
            <output>fcs/speedbrake-pos-norm</output>
        </kinematic>
    </channel>

    <channel name="Intake">
        <fcs_function name="fcs/intake1-pos-norm">
            <function>
                <min>
                    <max>
                        <property>fcs/intake1-cmd-norm</property>
                        <table>
                            <independentVar lookup="row">velocities/mach</independentVar>
                            <tableData>
                                0.0   0.0
                                0.5   0.0
                                1.0   1.0
                            </tableData>
                        </table>
                    </max>
                    <value>1.0</value>
                </min>
            </function>
            <output>fcs/intake2-pos-norm</output>
        </fcs_function>
        <fcs_function name="fcs/intake2-pos-norm">
            <function>
                <max>
                    <property>gear/gear-pos-norm</property>
                    <product>
                        <property>fcs/dogtooth</property><!-- only Flogger-K controls intake depending on AOA -->
                        <table>
                            <independentVar lookup="row">aero/alpha-deg</independentVar>
                            <tableData>
                                0.0   0.0
                                5.0   0.0
                                10.0   1.0
                            </tableData>
                        </table>
                    </product>
                </max>
            </function>
            <output>fcs/intake2-pos-norm</output>
        </fcs_function>
    </channel>
</flight_control>
